mN := N*10^-3
MN = 1000000 N
m_i(i) := {
    if i == 1
        30
    else if i == 2
        (30 + 60)/2 + 2000/0.2
    else if i == 3
        60
    else if i == 4
        40
    else if i == 5
        30
    else if i == 6
        3500
    else if i == 7
        50
    else if i == 8
        35
    else if i == 9
        2500
    else if i == 10
        (2500 + 50)/2 + 2000/0.2
    else if i == 11
        50
}*kg/m
EJ_i(i) := {
    if i == 1
        40
    else if i == 2
        (40 + 90)/2
    else if i == 3
        90
    else if i == 4
        60
    else if i == 5
        44
    else if i == 6
        44
    else if i == 7
        60
    else if i == 8
        55
    else if i == 9
        55
    else if i == 10
        (55 + 60)/2 + 3000
    else if i == 11
        60
}*MN*m^2
x(i) := {
    if i == 1
        1.7 - 0.1
    else if i == 2
        1.7 + 0.1
    else if i == 3
        3.5
    else if i == 4
        4
    else if i == 5
        7
    else if i == 6
        10
    else if i == 7
        11
    else if i == 8
        15
    else if i == 9
        19 - 0.1
    else if i == 10
        19 + 0.1
    else if i == 11
        21
}*m
l_i(i) :=
    if i == 1
        x(i)
    else
        x(i) - x(i - 1)
b_i(ω, i) := nthroot(ω^2*m_i(i)/EJ_i(i), 4)
S(x, ω, i) := 1/2*(cosh(b_i(ω, i)*x) + cos(b_i(ω, i)*x))
T(x, ω, i) := 1/2*(sinh(b_i(ω, i)*x) + sin(b_i(ω, i)*x))
U(x, ω, i) := 1/2*(cosh(b_i(ω, i)*x) - cos(b_i(ω, i)*x))
V(x, ω, i) := 1/2*(sinh(b_i(ω, i)*x) - sin(b_i(ω, i)*x))
A_i(x, ω, i) := [
    S(x, ω, i), T(x, ω, i)/b_i(ω, i), U(x, ω, i)/(EJ_i(i)*b_i(ω, i)^2), V(x, ω, i)/(EJ_i(i)*b_i(ω, i)^3);
    V(x, ω, i)*b_i(ω, i), S(x, ω, i), T(x, ω, i)/(EJ_i(i)*b_i(ω, i)), U(x, ω, i)/(EJ_i(i)*b_i(ω, i)^2);
    U(x, ω, i)*EJ_i(i)*b_i(ω, i)^2, V(x, ω, i)*EJ_i(i)*b_i(ω, i), S(x, ω, i), T(x, ω, i)/b_i(ω, i);
    V(x, ω, i)*EJ_i(i)*b_i(ω, i)^3, U(x, ω, i)*EJ_i(i)*b_i(ω, i)^2, V(x, ω, i)*b_i(ω, i), S(x, ω, i)
]
A_i(ω, i) := A_i(l_i(i), ω, i)
P(ω) := product(A_i(ω, i), i = 1 .. 11)
P(1/s) = [
    1.06321, 21.5412 m, 4.06575e-6 1/N, 2.99299e-5 s^2/kg;
    0.00932453 1/m, 1.1056, 4.0671e-7 1/J, 4.37048e-6 1/N;
    39832.7 N, 689406 J, 1.06469, 21.2798 m;
    355.312 kg/s^2, 38041.3 N, 0.00480429 1/m, 1.02528
]
D(ω) := P(ω)[2, 0]*P(ω)[3, 1] - P(ω)[2, 1]*P(ω)[3, 0]
ω := 0 rad/s, 0.1*rad/s .. 50*rad/s
# [plot: D(ω) vs ω]
# pic2
solve block
    # guess values
    ω := 20*1/s
    # constraints
    D(ω) == 0
    # solver
    ω_1 := find(ω) = 18.868 1/s
end solve block
solve block
    # guess values
    ω := 40*1/s
    # constraints
    D(ω) == 0
    # solver
    ω_2 := find(ω) = 43.4758 1/s
end solve block
solve block
    # guess values
    i := 0
    # constraints
    x(i) == x_1
    # solver
    i(x_1) := find(i)
end solve block
i(1*m) =  # error: Значение должно быть скаляром или матрицей.
f(x, ω, i) := P[0, 0](ω)
P(ω, i) := product(A_i(ω, j), j = 1 .. i - 1)
